// COMSOL Multiphysics 4.3.2.152 model "Initial_Layout.mph"
// Outline of the model tree

Selections
  sel1: Explicit on domains 1, 2
  sel2: Explicit on boundaries 1-14

Geometry
  geom1 "Geometry 1" (3D, length unit mm)
    sph1: Sphere | pos = {1, 1, 1}; axistype = cartesian; r = 10
    cyl1: Cylinder | pos = {1, 20, 1}; axistype = cartesian; r = 1; h = 1
    fin: Finalize "Form Assembly" | action = assembly; pairtype = contact

Physics
  es: Electrostatics on all domains
    dependent variable V
    ccn1: ChargeConservation (default) | materialType = solid
    zc1: ZeroCharge (default)
    init1: init "Initial Values 1" (default) | V = 5

Mesh
  mesh1 "Mesh 1" (physics-controlled)
    size: MeshSizeDefault | hauto = 5

Studies
  std1 "Study 1"
    stat: Stationary