// COMSOL Multiphysics 4.3.2.152 model "java_result.mph"
// Outline of the model tree

Geometry
  geom1 "Geometry 1" (3D, length unit mm)
    cyl1: Cylinder | r = 0.635; h = 15
    cyl2: Cylinder | pos = {0.625, 0, 0.4}; rot = 90; type = solid; axistype = x; r = 0.25; h = 0.04
    cyl3: Cylinder | pos = {0.625, 0, 1}; rot = 90; type = solid; axistype = x; r = 0.25; h = 0.04
    cyl4: Cylinder | pos = {0.625, 0, 1.6}; rot = 90; type = solid; axistype = x; r = 0.25; h = 0.04
    cyl5: Cylinder | pos = {0.625, 0, 2.2}; rot = 90; type = solid; axistype = x; r = 0.25; h = 0.04
    cyl6: Cylinder | pos = {0.625, 0, 2.8}; rot = 90; type = solid; axistype = x; r = 0.25; h = 0.04
    cyl7: Cylinder | pos = {0.625, 0, 3.4}; rot = 90; type = solid; axistype = x; r = 0.25; h = 0.04
    cyl8: Cylinder | pos = {0.625, 0, 4}; rot = 90; type = solid; axistype = x; r = 0.25; h = 0.04
    cyl9: Cylinder | pos = {0.625, 0, 4.6}; rot = 90; type = solid; axistype = x; r = 0.25; h = 0.04
    cyl10: Cylinder | pos = {0, -0.665, 0.4}; rot = 90; type = solid; axistype = y; r = 0.25; h = 0.04
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    sph1: Sphere | r = 20
    fin: Finalize "Form Assembly" | action = assembly; pairtype = contact

Materials
  mat1 "Acrylic plastic" on all domains
    def "Basic"
      thermalexpansioncoefficient = 7.0e-5[1/K]
      heatcapacity = 1470[J/(kg*K)]
      density = 1190[kg/m^3]
      thermalconductivity = 0.18[W/(m*K)]
      relpermittivity = 2.7
    Enu "Young's modulus and Poisson's ratio"
      youngsmodulus = 3.2e9[Pa]
      poissonsratio = 0.35
  mat2 "Titanium [solid,alpha]" on boundaries 9, 15, 21, 27, 33, 39, 45, 51, 65, 71, 77, 83, 89, 95, 101, 107, 114, 120, 126, 132, 138, 144, 150, 156, 164, 170, 176, 182, 188, 194, 200, 206
    def "Basic"
      dL = (dL(T[1/K])-dL(Tempref[1/K]))/(1+dL(Tempref[1/K]))
      thermalconductivity = k(T[1/K])[W/(m*K)]
      resistivity = res_solid_alpha_1(T[1/K])[ohm*m]
      thermalexpansioncoefficient = (alpha(T[1/K])[1/K]+(Tempref-293[K])*if(abs(T-Tempref)>1e-3,(alpha(T[1/K])[1/K]-alpha(Tempref[1/K])[1/K])/(T-Tempref),d(alpha(T[1/K]),T)[1/K]))/(1+alpha(Tempref[1/K])[1/K]*(Tempref-293[K]))
      heatcapacity = C_solid_1(T[1/K])[J/(kg*K)]
      HC = HC_solid_1(T[1/K])[J/(mol*K)]
      mu = mu(T[1/K])[Pa]
      electricconductivity = 1[S/m]
      density = rho(T[1/K])[kg/m^3]
      TD = TD(T[1/K])[m^2/s]
      VP = VP_solid_1(T[1/K])[Pa]
      kappa = kappa(T[1/K])[Pa]
      dL: Piecewise
        arg = T
        extrap = constant
        pieces = 
          {0.0, 40.0, -0.001489666-2.5E-7*T^1+1.25E-8*T^2}
          {40.0, 200.0, -0.001535+4.39824E-6*T^1-1.3978E-7*T^2+1.930653E-9*T^3-9.582605E-12*T^4+1.682692E-14*T^5}
          {200.0, 1144.0, -0.002006083+4.790918E-6*T^1+9.116775E-9*T^2-8.086306E-12*T^3+3.131446E-15*T^4}
      k: Piecewise
        arg = T
        extrap = constant
        pieces = 
          {0.0, 50.0, 1.46129*T^1-0.006261944*T^2+6.355161E-4*T^3-2.974167E-5*T^4+2.851803E-7*T^5}
          {50.0, 326.0, 58.17412-0.4851624*T^1+0.00288092*T^2-8.255595E-6*T^3+8.903946E-9*T^4}
          {326.0, 977.0, 41.95804-0.1227486*T^1+2.33331E-4*T^2-1.937431E-7*T^3+6.191111E-11*T^4}
          {977.0, 1950.0, 15.13513+0.004158454*T^1+1.376649E-6*T^2}
      res_solid_alpha_1: Piecewise | arg = T; extrap = constant; pieces = {77.0, 1100.0, 2.470175E-9+1.446126E-9*T^1+8.367811E-13*T^2-7.327418E-16*T^3}
      alpha: Piecewise | arg = T; extrap = constant; pieces = {0.0, 1144.0, 5.034683E-6+2.527512E-8*T^1-7.155452E-11*T^2+1.068357E-13*T^3-7.796841E-17*T^4+2.218768E-20*T^5}
      C_solid_1: Piecewise "Piecewise 1a"
        arg = T
        extrap = constant
        pieces = 
          {100.0, 300.0, -167.7468+7.086583*T^1-0.02978493*T^2+6.044771E-5*T^3-4.762589E-8*T^4}
          {300.0, 900.0, 464.052+0.1524656*T^1+2.12593E-4*T^2-1.720171E-7*T^3}
          {900.0, 1156.0, -33066.63+136.7738*T^1-0.2048109*T^2+1.335042E-4*T^3-3.171822E-8*T^4}
          {1156.0, 1944.0, 352.8258+0.1230479*T^1+6.657229E-5*T^2}
      HC_solid_1: Piecewise "Piecewise 1b"
        arg = T
        extrap = constant
        pieces = 
          {100.0, 300.0, -8.035071+0.3394473*T^1-0.001426698*T^2+2.895446E-6*T^3-2.28128E-9*T^4}
          {300.0, 900.0, 22.2281+0.007303101*T^1+1.01832E-5*T^2-8.239618E-9*T^3}
          {900.0, 1156.0, -1583.892+6.551466*T^1-0.009810442*T^2+6.394851E-6*T^3-1.519302E-9*T^4}
          {1156.0, 1944.0, 16.90036+0.005893992*T^1+3.188813E-6*T^2}
      mu: Piecewise | arg = T; extrap = constant; pieces = {293.0, 1073.0, 4.783492E10-2.376622E7*T^1}
      sigma_solid_alpha_1: Piecewise "Piecewise 1c" | arg = T; extrap = constant; pieces = {77.0, 1100.0, 1/(-7.327418E-16*T^3+8.367811E-13*T^2+1.446126E-09*T+2.470175E-09)}
      rho: Piecewise
        arg = T
        extrap = constant
        pieces = 
          {0.0, 20.0, 4520.168}
          {20.0, 160.0, 4520.925-0.07042247*T^1+0.002149145*T^2-2.875466E-5*T^3+1.417353E-7*T^4-2.481938E-10*T^5}
          {160.0, 1144.0, 4525.567-0.05296616*T^1-1.538843E-4*T^2+1.427212E-7*T^3-5.386443E-11*T^4}
      TD: Piecewise | arg = T; extrap = constant; pieces = {247.0, 863.0, 2.220338E-5-8.696256E-8*T^1+1.863542E-10*T^2-1.807157E-13*T^3+6.620199E-17*T^4}
      VP_solid_1: Piecewise "Piecewise 1d" | arg = T; extrap = constant; pieces = {293.0, 1941.0, (exp((-2.499100e+004/T-1.337600e+000*log10(T)+1.480581e+001)*log(10.0)))*1.333200e+002}
      kappa: Piecewise | arg = T; extrap = constant; pieces = {293.0, 1073.0, 1.056124E11+4.642769E7*T^1-82798.6*T^2}
    Enu "Young's modulus and Poisson's ratio"
      youngsmodulus = E(T[1/K])[Pa]
      poissonsratio = nu(T[1/K])
      E: Piecewise
        arg = T
        extrap = constant
        pieces = 
          {93.0, 293.0, 1.263539E11-4.823066E7*T^1-32810.22*T^2}
          {293.0, 1073.0, 1.267923E11-5.931971E7*T^1}
      nu: Piecewise | arg = T; extrap = constant; pieces = {293.0, 1073.0, 0.3207911+6.715403E-5*T^1-4.131016E-8*T^2+5.510325E-11*T^3}
  mat3 "Water, liquid" on domains 1
    def "Basic"
      dynamicviscosity = eta(T[1/K])[Pa*s]
      ratioofspecificheat = 1.0
      electricconductivity = 0.11[S/m]
      heatcapacity = Cp(T[1/K])[J/(kg*K)]
      density = rho(T[1/K])[kg/m^3]
      thermalconductivity = k(T[1/K])[W/(m*K)]
      soundspeed = cs(T[1/K])[m/s]
      relpermittivity = 1.1
      eta: Piecewise
        arg = T
        extrap = constant
        pieces = 
          {273.15, 413.15, 1.3799566804-0.021224019151*T^1+1.3604562827E-4*T^2-4.6454090319E-7*T^3+8.9042735735E-10*T^4-9.0790692686E-13*T^5+3.8457331488E-16*T^6}
          {413.15, 553.75, 0.00401235783-2.10746715E-5*T^1+3.85772275E-8*T^2-2.39730284E-11*T^3}
      Cp: Piecewise | arg = T; extrap = constant; pieces = {273.15, 553.75, 12010.1471-80.4072879*T^1+0.309866854*T^2-5.38186884E-4*T^3+3.62536437E-7*T^4}
      rho: Piecewise | arg = T; extrap = constant; pieces = {273.15, 553.75, 838.466135+1.40050603*T^1-0.0030112376*T^2+3.71822313E-7*T^3}
      k: Piecewise | arg = T; extrap = constant; pieces = {273.15, 553.75, -0.869083936+0.00894880345*T^1-1.58366345E-5*T^2+7.97543259E-9*T^3}
      cs: Interpolation | source = table; table = {{273, 1403}, {278, 1427}, {283, 1447}, {293, 1481}, {303, 1507}, {313, 1526}, {323, 1541}, {333, 1552}, {343, 1555}, {353, 1555}, {363, 1550}, {373, 1543}}; interp = piecewisecubic; extrap = const

Physics
  es: Electrostatics on all domains
    dependent variable V
    ccn1: ChargeConservation (default) | materialType = from_mat
    zc1: ZeroCharge (default)
    init1: init "Initial Values 1" (default)
    fp1: FloatingPotential on boundaries 1-8 | TerminalType = Circuit
    gnd1: Ground on boundaries 21, 27, 33, 39, 45, 51, 65, 71, 77, 83, 89, 95, 138, 144, 150, 156, 164, 170, 176, 182, 188, 194, 200, 206
    term1: Terminal on boundaries 114 | TerminalType = Voltage; V0 = 1
    term2: Terminal on boundaries 120 | TerminalType = Voltage; V0 = 1
    term3: Terminal on boundaries 126 | TerminalType = Voltage; V0 = 1
    term4: Terminal on boundaries 132 | TerminalType = Voltage; V0 = 1
    term5: Terminal on no boundaries | TerminalType = Voltage; V0 = 0
    term6: Terminal on no boundaries | TerminalType = Voltage; V0 = 0
    term7: Terminal on no boundaries | TerminalType = Voltage; V0 = 0
    term8: Terminal on no boundaries | TerminalType = Voltage; V0 = 0
    term9: Terminal on no boundaries | TerminalType = Voltage; V0 = 0
    term10: Terminal on no boundaries | TerminalType = Voltage; V0 = 0
    term11: Terminal on no boundaries | TerminalType = Voltage; V0 = 0
    term12: Terminal on no boundaries | TerminalType = Voltage; V0 = 0
    term13: Terminal on no boundaries | TerminalType = Voltage; V0 = 0
    term14: Terminal on no boundaries | TerminalType = Voltage; V0 = 0
    term15: Terminal on no boundaries | TerminalType = Voltage; V0 = 0
    term16: Terminal on no boundaries | TerminalType = Voltage; V0 = 0
    term17: Terminal on no boundaries | TerminalType = Voltage; V0 = 0
    term18: Terminal on no boundaries | TerminalType = Voltage; V0 = 0
    term19: Terminal on no boundaries | TerminalType = Voltage; V0 = 0
    term20: Terminal on no boundaries | TerminalType = Voltage; V0 = 0
    term21: Terminal on no boundaries | TerminalType = Voltage; V0 = 0
    term22: Terminal on no boundaries | TerminalType = Voltage; V0 = 0
    term23: Terminal on boundaries 101 | TerminalType = Voltage; V0 = -1
    term24: Terminal on boundaries 107 | TerminalType = Voltage; V0 = -1
    term25: Terminal on boundaries 9 | TerminalType = Voltage; V0 = -1
    term26: Terminal on boundaries 15 | TerminalType = Voltage; V0 = -1
    term27: Terminal on no boundaries | TerminalType = Voltage; V0 = 0
    term28: Terminal on no boundaries | TerminalType = Voltage; V0 = 0
    term29: Terminal on no boundaries | TerminalType = Voltage; V0 = 0
    term30: Terminal on no boundaries | TerminalType = Voltage; V0 = 0
    term31: Terminal on no boundaries | TerminalType = Voltage; V0 = 0
    term32: Terminal on no boundaries | TerminalType = Voltage; V0 = 0

Mesh
  mesh1 "Mesh 1" (physics-controlled)
    size: MeshSizeDefault | hauto = 4

Studies
  std1 "Study 1"
    stat: Stationary

Solver configurations
  sol1 "Solver 1" (study std1)
    v1: Variables "Dependent Variables 1"
    s1: Stationary "Stationary Solver 1"
      fc1: FullyCoupled | linsolver = i1
      i1: Iterative | linsolver = cg
        mg1: Multigrid | prefun = amg
      prob1: SolverProblem "Information 1"
        error1: SolverError "Error 1"

Datasets
  dset1: Solution | solution = sol1

Plots
  pg1: PlotGroup3D "3D Plot Group 1"
  pg2: PlotGroup3D "Electric Potential (es)" | data = dset1
    mslc1: Multislice
      expr = V
      multiplanexmethod = number
      xcoord = range(-5,5,5)
      multiplaneymethod = number
      ycoord = range(-5,5,5)
      multiplanezmethod = number
      zcoord = range(-5,5,5)

Exports
  plot1: Plot
    filename = C:\\Users\\A\\Dropbox\\DBS_Project\\Code\\AranCode\\DBS_Data_Analysis\\DataCapture\Data2014_0324_15_36.csv